# Quantum NOT
# Funzioni utili
kron(A, B) :=
    Nrows ← rows(A)*rows(B)
    Ncols ← cols(A)*cols(B)
    Y[Nrows - 1, Ncols - 1] ← 0
    for i ∈ 0 .. Nrows - 1
        for j ∈ 0 .. Ncols - 1
            Y[i, j] ← A[floor(i/rows(B)), floor(j/cols(B))]*B[mod(i, rows(B)), mod(j, cols(B))]
    Y
# Definizione porta logica e qubit
NOT_sqrt := [(1 + 1j)/2, (1 - 1j)/2; (1 - 1j)/2, (1 + 1j)/2]
NOT := NOT_sqrt^2 = [0, 1; 1, 0]
# Verifica che la matrice sia unitaria
|NOT_sqrt*transpose(conj(NOT_sqrt))| = 1
# Rappresentazione dei clasici bit 0 e 1
ket_0 := [1; 0]
ket_1 := [0; 1]
# Multi-qubit
ketN(V) :=
    y ←
        ket_0 if V[0] == 0
        ket_1 otherwise
    for i ∈ 1 .. last(V)
        y ←
            kron(y, ket_0) if V[i] == 0
            kron(y, ket_1) otherwise
    y
ketN(transpose([1, 1])) = [0; 0; 0; 1]
# Esempio di una sovrapposizione di stati del qubit
a*ket_0 + b*ket_1 → [a; b]
# Tabella di verità
NOT_sqrt*ket_0 = [0.5 + 0.5i; 0.5 - 0.5i]
NOT_sqrt*ket_1 = [0.5 - 0.5i; 0.5 + 0.5i]
NOT*ket_0 = [0; 1]
NOT*ket_1 = [1; 0]
# Numero di qubit necessario
m := 1
k := 2
Nqubit == m + k + 1  # con m qubit di ingresso e k numero di porte logiche quantistiche
Nqubit := m + k + 1 = 4
# Che si dividono in qubit di risposta, che tengono conto dello stato che evolve e qubit di
# cursore che tengono conto del progresso della computazione
# Esiste una correlazione tra i due insiemi di qubit, se il qubit del cursore è nella posizione finale
# significa che i qubit di risposta possono essere letti, la computazione è finita.
# Per l'esecuzione 3 qubit verranno usati a scopo di cursore e l'ultimo a scopo di risposta
# E' necessario usare un operatore che lovara su tutti e 4 i qubit contemporaneamente,
# la radice di NOT precedentemente definita, tuttavia, lavorava su un solo qubit alla volta.
#
# Si procede facendo il prodotto di Kronecker tra nqubit-1 matrici identiche e la porta logica desiderata
NOT_sqrt.4.4 :=
    y ← identity(2)
    for i ∈ 1 .. Nqubit - 2
        y ← kron(y, identity(2))
    kron(y, NOT_sqrt)
NOT_sqrt.4.4 = [
    0.5 + 0.5i, 0.5 - 0.5i, 0, 0, 0, 0, 0, 0, 0, 0, 0, 0, 0, 0, 0, 0;
    0.5 - 0.5i, 0.5 + 0.5i, 0, 0, 0, 0, 0, 0, 0, 0, 0, 0, 0, 0, 0, 0;
    0, 0, 0.5 + 0.5i, 0.5 - 0.5i, 0, 0, 0, 0, 0, 0, 0, 0, 0, 0, 0, 0;
    0, 0, 0.5 - 0.5i, 0.5 + 0.5i, 0, 0, 0, 0, 0, 0, 0, 0, 0, 0, 0, 0;
    0, 0, 0, 0, 0.5 + 0.5i, 0.5 - 0.5i, 0, 0, 0, 0, 0, 0, 0, 0, 0, 0;
    0, 0, 0, 0, 0.5 - 0.5i, 0.5 + 0.5i, 0, 0, 0, 0, 0, 0, 0, 0, 0, 0;
    0, 0, 0, 0, 0, 0, 0.5 + 0.5i, 0.5 - 0.5i, 0, 0, 0, 0, 0, 0, 0, 0;
    0, 0, 0, 0, 0, 0, 0.5 - 0.5i, 0.5 + 0.5i, 0, 0, 0, 0, 0, 0, 0, 0;
    0, 0, 0, 0, 0, 0, 0, 0, 0.5 + 0.5i, 0.5 - 0.5i, 0, 0, 0, 0, 0, 0;
    0, 0, 0, 0, 0, 0, 0, 0, 0.5 - 0.5i, 0.5 + 0.5i, 0, 0, 0, 0, 0, 0;
    0, 0, 0, 0, 0, 0, 0, 0, 0, 0, 0.5 + 0.5i, 0.5 - 0.5i, 0, 0, 0, 0;
    0, 0, 0, 0, 0, 0, 0, 0, 0, 0, 0.5 - 0.5i, 0.5 + 0.5i, 0, 0, 0, 0;
    0, 0, 0, 0, 0, 0, 0, 0, 0, 0, 0, 0, 0.5 + 0.5i, 0.5 - 0.5i, 0, 0;
    0, 0, 0, 0, 0, 0, 0, 0, 0, 0, 0, 0, 0.5 - 0.5i, 0.5 + 0.5i, 0, 0;
    0, 0, 0, 0, 0, 0, 0, 0, 0, 0, 0, 0, 0, 0, 0.5 + 0.5i, 0.5 - 0.5i;
    0, 0, 0, 0, 0, 0, 0, 0, 0, 0, 0, 0, 0, 0, 0.5 - 0.5i, 0.5 + 0.5i
]
# Verifica su un qubit:
NOT_sqrt.4.4^2*ketN(transpose([0, 0, 0, 0])) = [0; 1; 0; 0; 0; 0; 0; 0; 0; 0; 0; 0; 0; 0; 0; 0]
ketN(transpose([0, 0, 0, 1])) = [0; 1; 0; 0; 0; 0; 0; 0; 0; 0; 0; 0; 0; 0; 0; 0]
# L'evoluzione è possibile simulando l'equazione di Schroedinger
# con
h := 6.62607015*10^-34/(2*π)
j*h*(d/dt(ket(Ψ(t)))) == H*ket(Ψ(t))
# operatore
# Hamilitoniano
H == h^2/(2*m)*(∇^2)[□](-V(r))
# Perchè il sistema quantistico si comporti da circuito è necessario che
# l'Hamiltoniano sia tale da avere uno stato iniziale del registro ket(Ψ(0)) che permetta
# di fare evolvere il registro in modo tale da emulare un circuito
# La soluzione dell'equazione di Shroedinger può essere scritta come
ket(Ψ(t)) == e^(-j*H*t/h)*ket(Ψ(0)) == U(t)*ket(Ψ(0))
# Da cui si nota come a partire dallo stato iniziale l'evoluzione dipende dall'operatore
U(t) == e^(-j*H*t/h)
# Se ket(Ψ(0)) rappresenta l'ingresso del circuito è possibile ottenere la sua evoluzione
# tramite U(t)
#
# L'obiettivo è trovare un operatore hemiltoniano H tale che e^(-j*H*t/h) sia una matrice unitaria e
# tale che U(t) mimi il circuito desiderato.
# Siccome si vuole che i cursori funzionino come precedentemente descritto si dimostra
# [Feynman] che che l'Hamiltoniano è ricavabile come la somma dei prodotti scalari degli
# operatori di creazione e annichilimento con l' operatore di ogni gate (aumentato al numero di
# qubit) e l'hermitiano coniugato.
# Chimando M[k] il gate k-esimo aumentato, si definisce MM il prodotto scalare di tutt i gate
MM == product(M[k], k = N - 1 .. 0)  # con abuso di notazione
# Nel caso del NOT si ha
M := transpose([NOT_sqrt.4.4, NOT_sqrt.4.4])
MM := NOT_sqrt.4.4*NOT_sqrt.4.4
# Gli operatori di creazione e annichilimento si usano per muovere i cursori avanti e indietro tra
# i siti (gli "stati") del sistema in evoluzione
c[i + 1]*a[i]*M[i + 1]
# dove c è l'opreatore di creazione e
# a di annichilimento
# Operatore di creazione e annichilimento
c := [0, 0; 1, 0]
a := transpose(c) = [0, 1; 0, 0]
# L'operatore c agisce sullo stato di un singolo spin, e converto uno stato da 0 a 1,
# l'opeatore a è l'inverso (sullo stesso singolo stato)
# E' possibile adattare gli operatori in modo che operino sull'i-esimo qubit, per farlo si fa il
# prodotto di Kronecker tra N matrici, tutte identiche salvo la i-esima che si pone uguale all'operatore di interesse
# Ad esemipio nel caso in esame se si volesse creare l'opeatore di creazione per il secondo
# qubit (c_1) sarebbe possibile calcolarlo come: Id ⭙ c ⭙ Id ⭙ Id
C(k) :=
    y ←
        c if k == 0
        identity(2) otherwise
    for i ∈ 1 .. Nqubit - 1
        y ←
            kron(y, c) if k == i
            kron(y, identity(2)) otherwise
    y
A(k) :=
    y ←
        a if k == 0
        identity(2) otherwise
    for i ∈ 1 .. Nqubit - 1
        y ←
            kron(y, a) if k == i
            kron(y, identity(2)) otherwise
    y
# E' ora possibile calcolare l'operatore Hemiltoniano
H := sum(C(i + 1)*A(i)*M[i] + transpose(conj(C(i + 1)*A(i)*M[i])), i = 0 .. k - 1)
H = [
    0, 0, 0, 0, 0, 0, 0, 0, 0, 0, 0, 0, 0, 0, 0, 0;
    0, 0, 0, 0, 0, 0, 0, 0, 0, 0, 0, 0, 0, 0, 0, 0;
    0, 0, 0, 0, 0.5 + 0.5i, 0.5 - 0.5i, 0, 0, 0, 0, 0, 0, 0, 0, 0, 0;
    0, 0, 0, 0, 0.5 - 0.5i, 0.5 + 0.5i, 0, 0, 0, 0, 0, 0, 0, 0, 0, 0;
    0, 0, 0.5 - 0.5i, 0.5 + 0.5i, 0, 0, 0, 0, 0.5 + 0.5i, 0.5 - 0.5i, 0, 0, 0, 0, 0, 0;
    0, 0, 0.5 + 0.5i, 0.5 - 0.5i, 0, 0, 0, 0, 0.5 - 0.5i, 0.5 + 0.5i, 0, 0, 0, 0, 0, 0;
    0, 0, 0, 0, 0, 0, 0, 0, 0, 0, 0.5 + 0.5i, 0.5 - 0.5i, 0, 0, 0, 0;
    0, 0, 0, 0, 0, 0, 0, 0, 0, 0, 0.5 - 0.5i, 0.5 + 0.5i, 0, 0, 0, 0;
    0, 0, 0, 0, 0.5 - 0.5i, 0.5 + 0.5i, 0, 0, 0, 0, 0, 0, 0, 0, 0, 0;
    0, 0, 0, 0, 0.5 + 0.5i, 0.5 - 0.5i, 0, 0, 0, 0, 0, 0, 0, 0, 0, 0;
    0, 0, 0, 0, 0, 0, 0.5 - 0.5i, 0.5 + 0.5i, 0, 0, 0, 0, 0.5 + 0.5i, 0.5 - 0.5i, 0, 0;
    0, 0, 0, 0, 0, 0, 0.5 + 0.5i, 0.5 - 0.5i, 0, 0, 0, 0, 0.5 - 0.5i, 0.5 + 0.5i, 0, 0;
    0, 0, 0, 0, 0, 0, 0, 0, 0, 0, 0.5 - 0.5i, 0.5 + 0.5i, 0, 0, 0, 0;
    0, 0, 0, 0, 0, 0, 0, 0, 0, 0, 0.5 + 0.5i, 0.5 - 0.5i, 0, 0, 0, 0;
    0, 0, 0, 0, 0, 0, 0, 0, 0, 0, 0, 0, 0, 0, 0, 0;
    0, 0, 0, 0, 0, 0, 0, 0, 0, 0, 0, 0, 0, 0, 0, 0
]
# Operatore di evoluzione
# E' ora possibile calcoalre U(t), tramite l'esponenziale di matrice
expm(X) :=
    v ← eigenvals(X)
    M ← eigenvecs(X)
    v ← e^vectorize(v)
    M*diag(v)*M^-1
# Il calcolo verrà ora eseguito con un fattore di scala diverso, trascurando la costante di Plank ridotta, in modo da non incomnere in errori numerici, questo si traduce nel riscalare l'asse del tempo tale che un secondo nel riferimento riscalato equivalga a una costante di Plank ridotta secondi.
U(t) := expm(-1j*H*t)
U(1) = [
    1, 0, 0, 0, 0, 0, 0, 0, 0, 0, 0, 0, 0, 0, 0, 0;
    0, 1, 0, 0, 0, 0, 0, 0, 0, 0, 0, 0, 0, 0, 0, 0;
    0, 0, 0.577972, -7.29396e-17 - 6.21102e-17i, 0.349228 - 0.349228i, -0.349228 - 0.349228i, -1.79035e-16 - 1.17854e-17i, 0, 5.25717e-17 - 9.06756e-17i, -0.422028, 4.73446e-17 + 1.44956e-17i, 1.44956e-17 - 4.73446e-17i, 0, 1.51279e-16 + 6.72966e-17i, 0, 0;
    0, 0, 1.50923e-16 + 9.63267e-17i, 0.577972, -0.349228 - 0.349228i, 0.349228 - 0.349228i, -8.05228e-17 + 7.96001e-17i, 0, -0.422028, 1.56561e-16 + 4.65347e-17i, 9.83761e-18 + 3.16428e-17i, 3.16428e-17 - 9.83761e-18i, 0, -6.13595e-17 + 9.34779e-17i, 0, 0;
    0, 0, -0.349228 - 0.349228i, 0.349228 - 0.349228i, 0.155944, -2.86229e-16 + 2.60209e-17i, 3.84115e-17 + 8.54044e-17i, 0, 0.349228 - 0.349228i, -0.349228 - 0.349228i, 6.76542e-17 + 3.46945e-18i, 3.46945e-18 - 6.76542e-17i, 0, -5.13406e-17 - 5.76488e-17i, 0, 0;
    0, 0, 0.349228 - 0.349228i, -0.349228 - 0.349228i, 3.20558e-16 - 3.84892e-18i, 0.155944, -7.23194e-17 + 3.78559e-17i, 0, -0.349228 - 0.349228i, 0.349228 - 0.349228i, -3.05745e-17 + 3.10082e-17i, 3.10082e-17 + 3.05745e-17i, 0, -5.83969e-18 - 7.08156e-17i, 0, 0;
    0, 0, -4.04407e-17, 4.35089e-17 + 1.08703e-16i, 2.18332e-17 - 5.96253e-19i, 1.12398e-17 - 3.69255e-17i, 0.577972, 0, -4.73396e-17 - 8.07773e-17i, 1.47126e-16 - 1.11022e-16i, 0.349228 - 0.349228i, -0.349228 - 0.349228i, 0, -0.422028, 0, 0;
    0, 0, 1.17263e-18 + 2.96614e-18i, 2.0557e-18 - 6.0063e-19i, 7.02513e-18 - 1.87593e-18i, -8.38651e-18 - 9.4548e-18i, -5.29457e-17 - 4.76525e-17i, 0.577972, 4.26601e-18 - 2.28501e-18i, -5.56905e-18 + 1.59436e-17i, -0.349228 - 0.349228i, 0.349228 - 0.349228i, -0.422028, 4.23274e-18 - 3.14307e-17i, 0, 0;
    0, 0, -2.12073e-16 + 7.58175e-17i, -0.422028, -0.349228 - 0.349228i, 0.349228 - 0.349228i, 5.40005e-17 - 1.10825e-16i, 0, 0.577972, -1.99062e-16 + 2.25561e-17i, 7.50963e-18 - 7.35671e-18i, -7.35671e-18 - 7.50963e-18i, 0, 7.31637e-17 - 9.69474e-17i, 0, 0;
    0, 0, -0.422028, -3.63001e-17 - 1.07564e-16i, 0.349228 - 0.349228i, -0.349228 - 0.349228i, -6.47109e-17 - 3.8018e-17i, 0, 8.24991e-17 - 1.62001e-16i, 0.577972, -6.46918e-17 - 5.82203e-18i, -5.82203e-18 + 6.46918e-17i, 0, -4.63114e-17 + 1.02624e-17i, 0, 0;
    0, 0, 3.88139e-18 - 1.9736e-17i, -1.77316e-17 + 2.82292e-17i, -4.51028e-17 - 3.46945e-18i, -1.9082e-17 + 5.89806e-17i, -0.349228 - 0.349228i, 0.349228 - 0.349228i, 1.8599e-17 - 5.07806e-17i, 4.81603e-17 + 5.29125e-17i, 0.155944, 8.32667e-17 - 3.33067e-16i, 0.349228 - 0.349228i, -0.349228 - 0.349228i, 0, 0;
    0, 0, 2.90601e-17 + 1.95103e-19i, -2.90027e-17 - 1.78369e-17i, -1.73472e-18 - 4.85723e-17i, -5.89806e-17 - 6.93889e-18i, 0.349228 - 0.349228i, -0.349228 - 0.349228i, 4.635e-17 + 1.61022e-17i, -5.68157e-17 + 4.14383e-17i, 4.16334e-16i, 0.155944, -0.349228 - 0.349228i, 0.349228 - 0.349228i, 0, 0;
    0, 0, -2.02874e-19 - 8.00749e-18i, -7.54826e-19 + 2.18724e-18i, 2.5425e-19 + 2.89756e-18i, 4.30431e-18 - 2.65187e-18i, -3.16543e-17 + 3.55894e-17i, -0.422028, 1.45548e-18 + 5.02856e-19i, -6.94455e-18 + 4.96994e-18i, -0.349228 - 0.349228i, 0.349228 - 0.349228i, 0.577972, 2.55241e-17 + 5.18112e-17i, 0, 0;
    0, 0, 1.30104e-17, 3.69183e-17 + 1.04571e-16i, -6.22067e-18 + 2.14129e-17i, 6.10739e-18 + 2.99866e-17i, -0.422028, 0, -4.26286e-17 - 1.23823e-16i, -8.78204e-18, 0.349228 - 0.349228i, -0.349228 - 0.349228i, 0, 0.577972, 0, 0;
    0, 0, 0, 0, 0, 0, 0, 0, 0, 0, 0, 0, 0, 0, 1, 0;
    0, 0, 0, 0, 0, 0, 0, 0, 0, 0, 0, 0, 0, 0, 0, 1
]
# Evoluzione per un tempo fisso
# Avendo U(t) è ora possibile calcolare l'evoluzione dei registri al tempo t, mediante
ket(Ψ(t)) == U(t)*ket(Ψ(0))
# Lo stato iniziale dell'evoluzione ket(Ψ(0)) definisce lo stato iniziale dei qubit. Per quanto riguarda
# i qubit di cursore si settano tutti a ket(0) eccetto il primo che si setta a ket(1). Lo stato degli ingressi, (dell'ingresso in questo caso) può essere una sovrapposizione qualsiasi degli m qubit di
# ingresso. In questo caso il qubit di ingresso è unico, per cui potrà essere inzializzato solamente a ket(0) o a ket(1)*.
# Per cui a seconda che l'ingresso sia ket(0) o ket(1) si può definire lo stato iniziale come
Ψ0_0 := ketN([1; 0; 0; 0])
Ψ0_1 := ketN([1; 0; 0; 1])
i := 0 .. 99
dt := 0.1
t[i] := i*dt
j := 0 .. last(Ψ0_0)
Wave_0(t) := U(t)*Ψ0_0
waves_mtx_0[i, j] := Wave_0(t[i])[j]
Wave_1(t) := U(t)*Ψ0_1
waves_mtx_1[i, j] := Wave_1(t[i])[j]
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# Si nota che in entrambi i casi le curve rosse (evoluzione dello stato iniziale) e le curve
# viola (evoluzione dello stato finale) sono sfasate di 180 ° il che giustifica l'operazione NOT che
# è eseguita dalla ipotetica macchina quantistica.
# Si nota inoltre come l'evoluzione dei cursori (curva verde) permetta di comprendere il momento adatto in cui effettuare la misura.
